fCLK := 168*10^6
i := 1 .. 6
fPWM[i] := 3500, 4000, 4200, 4800, 5000, 5600
ARR_UP[i] := fCLK/fPWM[i]
ARR_UP_DOWN[i] := fCLK/(2*fPWM)[i]
fPWM[i] = [3500; 4000; 4200; 4800; 5000; 5600]
ARR_UP[i] = [48000; 42000; 40000; 35000; 33600; 30000]
ARR_UP_DOWN[i] = [24000; 21000; 20000; 17500; 16800; 15000]
